*Heading
** Job name: 15 Model name: Model-1
** Generated by: Abaqus/CAE 2017
*Preprint, echo=NO, model=NO, history=NO, contact=NO
**
** PARTS
**
*Part, name=cytoskeleton
*Node
      1,  -7.07106781,   7.07106781,           0.
      2,  -7.07106781,           0.,  -7.07106781
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*Element, type=C3D10M
  1,  498,  499,  189,  500,  894,  893,  892,  896,  895,  897
  2,  498,  499,  501,  190,  894,  899,  898,  901,  900,  902
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*Nset, nset=Set-1, generate
    1,  6248,     1
*Elset, elset=Set-1, generate
    1,  4050,     1
** Section: cytoskeleton
*Solid Section, elset=Set-1, material=cytoskeleton
,
*End Part
**
*Part, name=membrane
*Node
      1,           0.,           0.,           0.
      2,         -10.,           0.,           0.
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*Element, type=S3
  1,  63,   8,   7
  2,  94,   9,  10
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*Element, type=S3R
373, 389, 379, 378
374, 251, 260, 247
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*Element, type=S4R
385,  13,   2,  53, 225
386, 226, 225, 230, 231
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*Nset, nset=Set-3
   2,   3,   4,   5,   6,  13
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*Elset, elset=Set-3, generate
 373,  729,    1
*Nset, nset=Set-6
   1,   2,   3,   4,   5,   7
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*Elset, elset=Set-6, generate
   1,  372,    1
** Section: membrane
*Shell Section, elset=Set-6, material=membrane, offset=SNEG
0.01, 5
** Section: membrane
*Shell Section, elset=Set-3, material=membrane, offset=SPOS
0.01, 5
*End Part
**
*Part, name=nuclei
*Node
      1,  0.887120008,   7.38570786,           0.
      2,  0.887120008,  0.614292085,           0.
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*Element, type=C3D8R
  1,  22,   1,   5,  43,  63,  44,  46,  77
  2,   5,   6,  30,  43,  46,  47,  64,  77
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*Element, type=C3D6
617,  29,  11,  52,   4,   2,  45
618,  28,  10,  51,  29,  11,  52
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*Nset, nset=Set-1, generate
   1,  961,    1
*Elset, elset=Set-1, generate
   1,  896,    1
** Section: nuclei
*Solid Section, elset=Set-1, material=nuclei
,
*End Part
**
**
** ASSEMBLY
**
*Assembly, name=Assembly
**
*Instance, name=cytoskeleton-1, part=cytoskeleton
*End Instance
**
*Instance, name=nuclei-1, part=nuclei
          0.,         -0.5,           0.
*End Instance
**
*Instance, name=membrane-2, part=membrane
*End Instance
**
*Node
      1,         -15.,           0.,           0.
*Node
      2,          15.,           0.,           0.
*Nset, nset=_PickedSet36, internal
 1,
*Nset, nset=_PickedSet69, internal, instance=membrane-2
   1,   2,   3,   4,   5,   7
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*Elset, elset=_PickedSet69, internal, instance=membrane-2, generate
   1,  372,    1
*Nset, nset=_PickedSet86, internal, instance=cytoskeleton-1
    2,    3,    4,    5,    8,    9
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*Elset, elset=_PickedSet86, internal, instance=cytoskeleton-1
    3,   10,   33,   34,   44,   48
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*Nset, nset=_PickedSet106, internal
 1,
*Nset, nset=_PickedSet108, internal
 2,
*Nset, nset=_PickedSet111, internal
 1,
*Nset, nset=_PickedSet112, internal, instance=cytoskeleton-1
    1,    2,    3,    4,    5,    6
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*Elset, elset=_PickedSet112, internal, instance=cytoskeleton-1, generate
    1,  2187,     1
*Nset, nset=_PickedSet113, internal, instance=cytoskeleton-1, generate
    1,  6248,     1
*Elset, elset=_PickedSet113, internal, instance=cytoskeleton-1, generate
    1,  4050,     1
*Nset, nset=_PickedSet114, internal, instance=nuclei-1
   1,   2,   3,   4,  12,  13
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*Elset, elset=_PickedSet114, internal, instance=nuclei-1
   1,   4,   6,   7,   8,  11
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*Elset, elset=__PickedSurf77_SNEG, internal, instance=membrane-2, generate
 373,  729,    1
*Surface, type=ELEMENT, name=_PickedSurf77, internal
__PickedSurf77_SNEG, SNEG
*Elset, elset=__PickedSurf78_S3, internal, instance=cytoskeleton-1
   28,   72,  121,  153,  155,  182
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*Elset, elset=__PickedSurf78_S4, internal, instance=cytoskeleton-1
   34,  145,  191,  267, 1121, 1452
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*Elset, elset=__PickedSurf78_S2, internal, instance=cytoskeleton-1
  110,  324,  332, 1494, 1691, 1791, 1797, 1810, 1817, 1845, 1876, 1959, 2091, 2178
*Elset, elset=__PickedSurf78_S1, internal, instance=cytoskeleton-1
  126,  229,  472, 1581, 1696, 1716
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*Surface, type=ELEMENT, name=_PickedSurf78, internal
__PickedSurf78_S3, S3
__PickedSurf78_S4, S4
__PickedSurf78_S2, S2
__PickedSurf78_S1, S1
*Elset, elset=__PickedSurf84_SNEG, internal, instance=membrane-2, generate
   1,  372,    1
*Surface, type=ELEMENT, name=_PickedSurf84, internal
__PickedSurf84_SNEG, SNEG
*Elset, elset=__PickedSurf85_S3, internal, instance=cytoskeleton-1
    3,   10,   33,   44,   48,   95
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*Elset, elset=__PickedSurf85_S2, internal, instance=cytoskeleton-1
   34,  146,  210,  255,  261,  307
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*Elset, elset=__PickedSurf85_S1, internal, instance=cytoskeleton-1
  130,  223,  228,  236,  376,  941
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*Elset, elset=__PickedSurf85_S4, internal, instance=cytoskeleton-1
  308,  436,  637, 1898, 1901, 1940
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*Surface, type=ELEMENT, name=_PickedSurf85, internal
__PickedSurf85_S3, S3
__PickedSurf85_S2, S2
__PickedSurf85_S4, S4
__PickedSurf85_S1, S1
*Surface, type=NODE, name=_PickedSet112_CNS_, internal
_PickedSet112, 1.
*Surface, type=NODE, name=_PickedSet113_CNS_, internal
_PickedSet113, 1.
*Surface, type=NODE, name=_PickedSet114_CNS_, internal
_PickedSet114, 1.
** Constraint: cy1
*MPC
BEAM, _PickedSet112, _PickedSet111
** Constraint: cy2nu
*Tie, name=cy2nu, adjust=yes
_PickedSet114_CNS_, _PickedSet113_CNS_
** Constraint: tie
*Tie, name=tie, adjust=yes
_PickedSurf78, _PickedSurf77
** Constraint: tie2
*Tie, name=tie2, adjust=yes
_PickedSurf85, _PickedSurf84
*End Assembly
*Amplitude, name=Amp-1, definition=SMOOTH STEP
             0.,              0.,              1.,              1.
*Amplitude, name=Amp-2, definition=SMOOTH STEP
             0.,              0.,              1.,              1.
*Amplitude, name=Amp-3, definition=SMOOTH STEP
             0.,              0.,           1e-05,              1.
**
** MATERIALS
**
*Material, name=cytoskeleton
*Density
 1e-21,
*Elastic
 7e-10, 0.4
*Material, name=envelop
*Density
 1.2e-21,
*Elastic
 4e-10, 0.4
*Material, name=membrane
*Density
 1.2e-21,
*Elastic
 4e-10, 0.4
*Material, name=nuclei
*Density
 1.2e-21,
*Elastic
 4e-10, 0.4
** ----------------------------------------------------------------
**
** STEP: Step-1
**
*Step, name=Step-1, nlgeom=YES
*Dynamic, Explicit
, 1e-05
*Bulk Viscosity
0.06, 1.2
**
** BOUNDARY CONDITIONS
**
** Name: rigid substrate Type: Symmetry/Antisymmetry/Encastre
*Boundary
_PickedSet69, YSYMM
** Name: rigid2 Type: Symmetry/Antisymmetry/Encastre
*Boundary
_PickedSet86, YSYMM
**
** LOADS
**
** Name: Load-1   Type: Concentrated force
*Cload, amplitude=Amp-3
_PickedSet36, 1, -8e-14
_PickedSet36, 2, 0.
**
** OUTPUT REQUESTS
**
*Restart, write, number interval=1, time marks=NO
**
** FIELD OUTPUT: F-Output-1
**
*Output, field, variable=PRESELECT
**
** HISTORY OUTPUT: H-Output-1
**
*Output, history, variable=PRESELECT
*End Step
